// SBML level 3 version 1

model mp25star()
  // model units - substance: substance, time: second, extent: substance

  // Compartments:
  compartment Compartment_600_0_ = 1e-12 volume;

  // Species:
  substanceOnly species G2K_602_0_ in Compartment_600_0_ = 6.022142e8;
  substanceOnly species PG2_603_0_ in Compartment_600_0_ = 6.022142e8;
  substanceOnly species A_dot_A_604_0_ in Compartment_600_0_ = 6.022142e8;
  substanceOnly species Wee1_605_0_ in Compartment_600_0_ = 6.022142e8;
  substanceOnly species Cdc25_606_0_ in Compartment_600_0_ = 6.022142e8;
  substanceOnly species Wee1_star__607_0_ in Compartment_600_0_ = 0;
  substanceOnly species EWback_608_0_ in Compartment_600_0_ = 6.022142e8;
  substanceOnly species Cdc25_star__609_0_ in Compartment_600_0_ = 0;
  substanceOnly species E25back_610_0_ in Compartment_600_0_ = 6.022142e8;
  substanceOnly species G2K_dash_R_611_0_ in Compartment_600_0_ = 6.022142e8;
  substanceOnly species R_612_0_ in Compartment_600_0_ = 6.022142e8;
  substanceOnly species ube_613_0_ in Compartment_600_0_ = 6.022142e8;
  substanceOnly species c13degraded_614_0_ in Compartment_600_0_ = 0;
  substanceOnly species c2_615_0_ in Compartment_600_0_ = 0;
  substanceOnly species Rdegraded_616_0_ in Compartment_600_0_ = 0;
  substanceOnly species IE_star__617_0_ in Compartment_600_0_ = 0;
  substanceOnly species IE_618_0_ in Compartment_600_0_ = 6.022142e8;
  substanceOnly species UBE_star__619_0_ in Compartment_600_0_ = 0;
  substanceOnly species EIback_620_0_ in Compartment_600_0_ = 0;
  substanceOnly species EUback_621_0_ in Compartment_600_0_ = 6.022142e8;
  substanceOnly species PG2R_622_0_ in Compartment_600_0_ = 6.022142e8;
  substanceOnly species AA2_623_0_ in Compartment_600_0_ = 6.022142e8;
  substanceOnly species G1K_624_0_ in Compartment_600_0_ = 6.022142e8;
  substanceOnly species AA3_625_0_ in Compartment_600_0_ = 6.022142e8;
  substanceOnly species MPFHASH_626_0_ in Compartment_600_0_ = 0;
  substanceOnly species G1KR_627_0_ in Compartment_600_0_ = 6.022142e8;
  substanceOnly species Cg2degraded_628_0_ in Compartment_600_0_ = 0;
  substanceOnly species UbE2_629_0_ in Compartment_600_0_ = 6.022142e8;
  substanceOnly species UbE2_star__630_0_ in Compartment_600_0_ = 0;
  substanceOnly species EU2back_631_0_ in Compartment_600_0_ = 6.022142e8;
  substanceOnly species $MPF_S_632_0_ in Compartment_600_0_;
  substanceOnly species $SPF_633_0_ in Compartment_600_0_;
  substanceOnly species $MPF_634_0_ in Compartment_600_0_;

  // Assignment rules:
  MPF_S_632_0_ := G2K_602_0_ + PG2_603_0_;
  SPF_633_0_ := MPF_S_632_0_ + MPFHASH_626_0_ + G1K_624_0_ + MPF_634_0_;
  MPF_634_0_ := G2K_602_0_ + PG2_603_0_;

  // Reactions:
  k1_641_0_: A_dot_A_604_0_ => G2K_602_0_; k1_641_0__Kf*A_dot_A_604_0_;
    k1_641_0__Kf = 0.015 per_second;
  kwee_642_0_: G2K_602_0_ + Wee1_605_0_ => PG2_603_0_; kwee_642_0__Kf*G2K_602_0_*Wee1_605_0_;
    kwee_642_0__Kf = 5.811886e-10 per_item_per_second;
  k25_643_0_: PG2_603_0_ + Cdc25_606_0_ => G2K_602_0_; k25_643_0__Kf*PG2_603_0_*Cdc25_606_0_;
    k25_643_0__Kf = 8.302694e-10 per_item_per_second;
  k2_644_0_: G2K_602_0_ + ube_613_0_ => c13degraded_614_0_ + c2_615_0_; k2_644_0__Kf*G2K_602_0_*ube_613_0_;
    k2_644_0__Kf = 4.151347e-10 per_item_per_second;
  y_645_0_: AA2_623_0_ => R_612_0_; y_645_0__Kf*AA2_623_0_;
    y_645_0__Kf = 0.09375 per_second;
  h_646_0_: G2K_602_0_ + R_612_0_ -> G2K_dash_R_611_0_; h_646_0__Kf*G2K_602_0_*R_612_0_ - h_646_0__Kb*G2K_dash_R_611_0_;
    h_646_0__Kf = 1.660539e-7 per_item_per_second; h_646_0__Kb = 0.1 per_second;
  q_647_0_: R_612_0_ => Rdegraded_616_0_; q_647_0__Kf*R_612_0_;
    q_647_0__Kf = 0.1875 per_second;
  z_648_0_: AA3_625_0_ -> G1K_624_0_; z_648_0__Kf*AA3_625_0_ - z_648_0__Kb*G1K_624_0_;
    z_648_0__Kf = 0.00175 per_second; z_648_0__Kb = 0.2 per_second;
  x_649_0_: PG2_603_0_ + R_612_0_ -> PG2R_622_0_; x_649_0__Kf*PG2_603_0_*R_612_0_ - x_649_0__Kb*PG2R_622_0_;
    x_649_0__Kf = 1.660539e-7 per_item_per_second; x_649_0__Kb = 0.1 per_second;
  o_650_0_: PG2R_622_0_ -> PG2_603_0_ + Rdegraded_616_0_; o_650_0__Kf*PG2R_622_0_ - o_650_0__Kb*PG2_603_0_*Rdegraded_616_0_;
    o_650_0__Kf = 0.1875 per_second; o_650_0__Kb = 3.321078e-10 per_item_per_second;
  c_651_0_: R_612_0_ + G1K_624_0_ -> G1KR_627_0_; c_651_0__Kf*R_612_0_*G1K_624_0_ - c_651_0__Kb*G1KR_627_0_;
    c_651_0__Kf = 1.660539e-10 per_item_per_second; c_651_0__Kb = 0.2 per_second;
  w_652_0_: G1KR_627_0_ => R_612_0_ + c2_615_0_ + Cg2degraded_628_0_; w_652_0__Kf*G1KR_627_0_;
    w_652_0__Kf = 0 per_second;
  v_653_0_: G1KR_627_0_ -> Rdegraded_616_0_ + G1K_624_0_; v_653_0__Kf*G1KR_627_0_ - v_653_0__Kb*Rdegraded_616_0_*G1K_624_0_;
    v_653_0__Kf = 0.1875 per_second; v_653_0__Kb = 3.321078e-10 per_item_per_second;
  f_654_0_: G2K_dash_R_611_0_ => G2K_602_0_ + Rdegraded_616_0_; f_654_0__Kf*G2K_dash_R_611_0_;
    f_654_0__Kf = 0.1875 per_second;
  p_655_0_: G2K_dash_R_611_0_ -> R_612_0_ + c13degraded_614_0_ + c2_615_0_; p_655_0__Kf*G2K_dash_R_611_0_ - p_655_0__Kb*R_612_0_*c13degraded_614_0_*c2_615_0_;
    p_655_0__Kf = 0.05 per_second; p_655_0__Kb = 6.893473e-19 per_item_sq_per_second;
  l_656_0_: PG2R_622_0_ -> R_612_0_ + c13degraded_614_0_ + c2_615_0_; l_656_0__Kf*PG2R_622_0_ - l_656_0__Kb*R_612_0_*c13degraded_614_0_*c2_615_0_;
    l_656_0__Kf = 0.05 per_second; l_656_0__Kb = 6.893473e-19 per_item_sq_per_second;
  K_657_0_: G1K_624_0_ + UbE2_629_0_ => c2_615_0_ + Cg2degraded_628_0_; K_657_0__Kf*G1K_624_0_*UbE2_629_0_;
    K_657_0__Kf = 1.245404e-8 per_item_per_second;
  // kcat*Wee1_star__607_0_*EWback_608_0_/(Km +Wee1_star__607_0_)
  MMenz1_658_0_: Wee1_star__607_0_ => Wee1_605_0_; MMenz1_658_0__kcat*Wee1_star__607_0_*EWback_608_0_/(MMenz1_658_0__Km + Wee1_star__607_0_);  // modifiers: EWback_608_0_
    MMenz1_658_0__Km = 6.022142e7 substance; MMenz1_658_0__kcat = 0.25 per_second;
  // kcat*Cdc25_606_0_*E25back_610_0_/(Km +Cdc25_606_0_)
  MMenz2_659_0_: Cdc25_606_0_ => Cdc25_star__609_0_; MMenz2_659_0__kcat*Cdc25_606_0_*E25back_610_0_/(MMenz2_659_0__Km + Cdc25_606_0_);  // modifiers: E25back_610_0_
    MMenz2_659_0__Km = 6.022142e7 substance; MMenz2_659_0__kcat = 0.25 per_second;
  // kcat*UBE_star__619_0_*IE_618_0_/(Km +UBE_star__619_0_)
  MMenz_660_0_: UBE_star__619_0_ => ube_613_0_; MMenz_660_0__kcat*UBE_star__619_0_*IE_618_0_/(MMenz_660_0__Km + UBE_star__619_0_);  // modifiers: IE_618_0_
    MMenz_660_0__Km = 6022142 substance; MMenz_660_0__kcat = 0.4 per_second;
  // kcat*IE_618_0_*EIback_620_0_/(Km +IE_618_0_)
  MMenz1_661_0_: IE_618_0_ => IE_star__617_0_; MMenz1_661_0__kcat*IE_618_0_*EIback_620_0_/(MMenz1_661_0__Km + IE_618_0_);  // modifiers: EIback_620_0_
    MMenz1_661_0__Km = 6022142 substance; MMenz1_661_0__kcat = 0.1 per_second;
  // kcat*ube_613_0_*EUback_621_0_/(Km +ube_613_0_)
  MMenz2_662_0_: ube_613_0_ => UBE_star__619_0_; MMenz2_662_0__kcat*ube_613_0_*EUback_621_0_/(MMenz2_662_0__Km + ube_613_0_);  // modifiers: EUback_621_0_
    MMenz2_662_0__Km = 6022142 substance; MMenz2_662_0__kcat = 0.1 per_second;
  // kcat*IE_star__617_0_*MPFHASH_626_0_/(Km +IE_star__617_0_)
  MMenz_663_0_: IE_star__617_0_ => IE_618_0_; MMenz_663_0__kcat*IE_star__617_0_*MPFHASH_626_0_/(MMenz_663_0__Km + IE_star__617_0_);  // modifiers: MPFHASH_626_0_
    MMenz_663_0__Km = 6022142 substance; MMenz_663_0__kcat = 0.4 per_second;
  // kcat*UbE2_629_0_*EU2back_631_0_/(Km +UbE2_629_0_)
  MMenz1_664_0_: UbE2_629_0_ => UbE2_star__630_0_; MMenz1_664_0__kcat*UbE2_629_0_*EU2back_631_0_/(MMenz1_664_0__Km + UbE2_629_0_);  // modifiers: EU2back_631_0_
    MMenz1_664_0__Km = 3011071 substance; MMenz1_664_0__kcat = 0.1 per_second;
  // kcat*UbE2_star__630_0_*MPF_S_632_0_/(Km +UbE2_star__630_0_)
  MMenz_665_0_: UbE2_star__630_0_ => UbE2_629_0_; MMenz_665_0__kcat*UbE2_star__630_0_*MPF_S_632_0_/(MMenz_665_0__Km + UbE2_star__630_0_);  // modifiers: MPF_S_632_0_
    MMenz_665_0__Km = 3.011071e7 substance; MMenz_665_0__kcat = 1 per_second;
  // kcat*R_612_0_*SPF_633_0_/(Km +R_612_0_)
  MMenz_666_0_: R_612_0_ => Rdegraded_616_0_; MMenz_666_0__kcat*R_612_0_*SPF_633_0_/(MMenz_666_0__Km + R_612_0_);  // modifiers: SPF_633_0_
    MMenz_666_0__Km = 602214.2 substance; MMenz_666_0__kcat = 3.25 per_second;
  // kcat*Wee1_605_0_*Cdc25_star__609_0_*MPF_634_0_/(Km +Wee1_605_0_*Cdc25_star__609_0_)
  MMenz_667_0_: Wee1_605_0_ + Cdc25_star__609_0_ => Cdc25_606_0_ + Wee1_star__607_0_; MMenz_667_0__kcat*Wee1_605_0_*Cdc25_star__609_0_*MPF_634_0_/(MMenz_667_0__Km + Wee1_605_0_*Cdc25_star__609_0_);  // modifiers: MPF_634_0_
    MMenz_667_0__Km = 3.626619e16 substance; MMenz_667_0__kcat = 1 per_second;

  // Unit definitions:
  unit volume = litre;
  unit substance = item;
  unit per_second = 1 / second;
  unit per_item_per_second = 1 / (item * second);
  unit per_item_sq_per_second = 1 / (item^2 * second);
end
